# Прямое и обратное преобразование Фурье
y(t) := 6*sin(t) + sin(6*t) + rnd(1)
i := 0 .. 63
v[i] := y(i/6)
f := fft(v)
a := ifft(f)
# Прямое БПФ | Обратное БПФ
j := 0 .. 31
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# ПРИМЕНЕНИЕ БПФ ДЛЯ СПЕКТРАЛЬНОГО РАЗЛОЖЕНИЯ И СИНТЕЗА ИМПУЛЬСА
i := 0 .. 127
q[i] := 0
# Формирование сигнала в виде прямоугольного импульса
i := 14 .. 57
q[i] := 1
f := fft(q)  # Прямое БПФ
k := 14  # маскимальное число гармоник
j := 0 .. 64
g[j] := if(j ≤ k, f[j], 0)  # Ограничение числа гармоник
h := ifft(g)
i := 0 .. 127
# Обратное БПФ
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# наблюдается эффект Гиббса при резком переходе
i := 0 .. 128
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cf := cfft(q)
i := 0 .. 128  # быстрое БПФ
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